# Worksheet setting: ORIGIN = 1
# The following MathCAD file provides a worked example of the procedure outlined in the paper to estimate the dynamic properties of wall-frame structures.
# The building parameters are defined within the first two pages, including the number of storeys, beam, column and wall dimensions etc...
#
# This example is for a simple 10 storey wall-frame structure with regular dimensions up the structures' height. Beam, column, and wall sections are rectangular. This file can easily be adapted for steel sections, or I and C shaped walls.
# Wall-frame elevation sketch | Column cross-section
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# Beam cross-section
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# Rectangular wall cross-section
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# Building parameters:
n := 10  # No. of storeys
i := 1, 2 .. n
E_c := 25 GPa  # Concrete elastic modulus
f'_c := 30 MPa  # Concrete strength
h := 3.6 m  # Typical storey height
n_c := 4  # No. of columns
n_b := n_c  # No. of beams
A := (6 m)^2*(n_c + 1)  # Floor area of a 2D frame
mass := 8 kPa*A*1/g = 146.839 tonne  # Mass of a single floor
W := mass*n*g = 14400 kN  # Building weight
# Setting floor heights:
h[i] := 3.6 m  # Setting floor height array
h[1] := 4.0 m  # First floor height
H := sum(h[i], i = 1 .. n) = 36.4 m  # Total building height
# Column properties: (Assumed square for this example)
h_c := 600 mm  # Column cross-section depth
b_c := h_c  # Column cross-section width
I_c := b_c*h_c^3/12  # Second moment of area
# Beam properties:
L := 6000 mm  # Beam length
h_b := 400 mm  # Beam depth
w_b := 300 mm  # Beam width
I_b := w_b*h_b^3/12  # Second moment of area
# Wall properties
L_w := 6.0 m  # Wall length
t_w := 250 mm  # Wall thickness
I_w := L_w^3*t_w/12  # Second moment of area
# Calculating the storey stiffness of a frame structure. (Schultz, 1992)
k_c1 := I_c/h[1]
k_c2 := I_c/h[2]  # Relative column stiffness
k_b := I_b/L  # Relative beam stiffness
k_0 := 24*E_c/h[1]^2*1/(2/(n_c*k_c1) + 1/(n_b*k_b) + 0) = 33.4021 kN/mm  # First floor storey stiffness
k := 24*E_c/h[2]^2*1/(2/(n_c*k_c2) + 1/(n_b*k_b) + 1/(n_b*k_b)) = 22.6757 kN/mm  # All other floors
k_f[i] := k
k_f[1] := k_0
# Obtaining storey stiffness of the wall
F[i] := i*100 kN  # Applying linear force distribution up height
# [plot: i vs F[i] (kN)]
V[i] := sum(F[j], j = i .. n)  # Calculating relative shear forces at each floor
# [plot: i vs V[i] (kN)]
M[i] := sum(V[j]*h[i], j = i .. n)  # Moment demands at each floor
# [plot: i vs M[i] (kN*m)]
ϕ[i] := M[i]/(E_c*I_w)  # Curvature at each floor level
Δθ[i] := ϕ[i]*h[i]  # Change in slope (rotations) at each floor
Δθ[1] := ϕ[1]*h[1]/2  # Change in slope at the base
θ[i] := sum(Δθ[j], j = 1 .. i)  # Storey slope (drift)
# [plot: i vs θ[i]]
Δ_f[i] := V[i]/k_f[i]
Δ_w[i] := V[i]/K_w[i]  # error: This variable is undefined. Check that the label is set correctly.
Δ[i] := θ[i]*h[i]  # Inter-storey displacement
3*K_w =  # error: This variable is undefined. Check that the label is set correctly.
3 K = 3e-6 kN/mm*s^2*K/kg
# [plot: i vs Δ[i] (mm)]
δ_f[i] := sum(Δ_f[j], j = 1 .. i)
δ_w[i] := sum(Δ_w[j], j = 1 .. i)  # error: This variable is undefined. Check that the label is set correctly.
Φ_f[i] := δ_f[i]/δ_f[n]
Φ_w[i] := δ_w[i]/δ_w[n]  # error: This variable is undefined. Check that the label is set correctly.
δ[i] := sum(Δ[j], j = 1 .. i)  # Deflected shape of cantilevered wall
# [plot: i vs δ[i] (mm)]
K_w[i] := V[i]/Δ[i]  # Wall storey stiffness
# The storey stiffness of the wall and frame at each floor is then combined and the period of the structure is estimated using Rayleigh's principle by applying an arbitrary force distribution.
K[i] := K_w[i] + k_f[i]  # Sum of wall and frame stiffness'
F[i] := i*100 kN  # Arbitrary linear force distribution
V[i] := sum(F[j], j = i .. n)  # Shear demand at each floor
Δ[i] := V[i]/K[i]  # Storey deflection
δ[i] := sum(Δ[j], j = 1 .. i)  # Deflection at each floor up the height
# Check the period of the structure using Rayleigh's method.
# Max Potential Energy = PE = Area under the force displacement graph
# Since we have MDOF system, potential energy at each floor need to be combined.
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# Potential energy equation
PE == sum(1/2*k*Δ^2) == sum(1/2*F*δ^2)
# Kinetic energy is equal to half the mass times velocity squared, where velocity, v, is equal to displacement, δ, multiplied by the angular frequency,ω
KE == sum(1/2*mass*v^2)
v == ω*δ
# Based on conservation of energy, potential energy is equal to the kinetic energy of the system
PE == KE
sum(1/2*k*Δ^2) == sum(1/2*mass*(ω*δ)^2)
# Angular frequency is then computed by rearranging the equation for conservation of energy
PE := sum(1/2*F[i]*δ[i], i = 1 .. n) = 609827 J  # Potential energy of MDOF system
KE_r := sum(1/2*mass*δ[i]^2, i = 1 .. n) = 28693.7 J*s^2  # Relative kinetic energy
ω := sqrt(PE/KE_r) = 4.6101 1/s  # Circular frequency
T_1 := 2*π/ω = 1.36292 s  # 1st mode elastic period
Φ[i] := δ[i]/δ[n] = [0.0311461; 0.0961303; 0.188209; 0.299675; 0.42377; 0.554315; 0.685313; 0.810262; 0.920503; 1]  # Mode-shape of the wall-frame structure
